/prep7
*GET,P1,ACTIVE,,TIME,CPU
RECTNG,0.016,0.15/2,0,0.008
RECTNG,0,0.008,0.016,0.15/2
CYL4,0.016,0.016,0.008,180,0.016,270
AGEN,1,ALL,,,-0.15/2,,,,1,1
ARSYM,X,ALL
/rep, fast
AGEN,1,ALL,,,0,-0.15/2,,,1,1
ARSYM,Y,ALL
/rep, fast
AGLUE,ALL
LESIZE,ALL,0.001
ET,1,PLANE183
AMESH,ALL
secwrite,github/spe/shs,,,1
*GET,P2,ACTIVE,,TIME,CPU
SECREAD,github/spe/shs,,,MESH
*GET,P3,ACTIVE,,TIME,CPU
SECPLOT,1,1
